*HEADING
cubit(estfiles/mortar_tests/POT_Dejori/hex20/Mesh_POTDejori.inp): 07/23/2026: 12
version: 2025.8
**
********************************** P A R T S **********************************
*PART, NAME=Part-Default
**
********************************** N O D E S **********************************
*NODE, NSET=ALLNODES
       1,    5.000000e+00,    2.500000e+02,   -4.000000e+00
       2,    5.000000e+00,    1.900000e+02,   -4.000000e+00
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**
********************************** E L E M E N T S ****************************
*ELEMENT, TYPE=C3D20R, ELSET=concrete
       1,   19658,   19656,   19672,   19671,    4371,   10030,   10047,   10044,   38719,   38722,   38721,   38720,   22074,   22110,   22112,   22105,   57281,   57282,   57283,   57284
       2,   19666,   19671,   19672,   19667,    4374,   10044,   10047,   10039,   38723,   38721,   38725,   38724,   22108,   22112,   22111,   22093,   57285,   57284,   57283,   57286
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*ELEMENT, TYPE=C3D20R, ELSET=steel_supports
    9163,   10371,   10373,   19704,   19678,     838,    9152,   10285,    2412,   35583,   66250,   66249,   66223,   22702,   66357,   66358,   66227,   35595,   35596,   66359,   66231
    9164,   19690,   19678,   19704,   19703,    2413,    2412,   10285,   10283,   66251,   66249,   66253,   66252,   66317,   66358,   66356,   66355,   66360,   66231,   66359,   66361
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*ELEMENT, TYPE=C3D20R, ELSET=steel_anchor
    9229,     834,     520,     519,     545,     417,     128,       1,       3,   66825,   66797,   66796,   66826,   68133,   67516,   67465,   68156,   68208,   68182,   68181,   68207
    9230,     833,     834,     545,     544,     416,     417,       3,       4,   66827,   66826,   66795,   66828,   68132,   68156,   67466,   68155,   68209,   68208,   68207,   68206
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**
********************************** N O D E S E T S **********************************
*NSET, NSET=load
       1,     102,     126,     127,     128,     495
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*NSET, NSET=displacement_anchor
      40,      48,      49,      50,      51,      52
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*NSET, NSET=nodeset_conc
     838,     839,     840,     844,     845,     846
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*NSET, NSET=nodeset_stl_supports
     835,     836,     837,     838,     839,     840
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*NSET, NSET=nodeset_stl_anchor
       1,       2,       3,       4,       5,       6
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*NSET, NSET=bc_left
     841,     842,     843,    1764,    1769,   19705
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**
********************************** S I D E S E T S **********************************
*ELSET, ELSET=bc_left_surface_S3
    9209,    9215
*ELSET, ELSET=bc_left_surface_S6
    9211,    9228
*SURFACE, NAME=bc_left_surface
bc_left_surface_S3, S3
bc_left_surface_S6, S6
*ELSET, ELSET=bc_right_surface_S3
    9182,    9195
*ELSET, ELSET=bc_right_surface_S6
    9178,    9184
*SURFACE, NAME=bc_right_surface
bc_right_surface_S3, S3
bc_right_surface_S6, S6
*ELSET, ELSET=cont_surf_stl_l_S3
    9301,    9302,    9303,    9304,    9305,    9306
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*ELSET, ELSET=cont_surf_stl_l_S5
    9325,    9326,    9327,    9328,    9329,    9330,    9331,    9332
*ELSET, ELSET=cont_surf_stl_l_S6
    9332,    9340,    9348,    9356,    9364,    9372,    9380,    9388,    9396,    9404,
    9412,    9420,    9428,    9436
*SURFACE, NAME=cont_surf_stl_l
cont_surf_stl_l_S3, S3
cont_surf_stl_l_S5, S5
cont_surf_stl_l_S6, S6
*ELSET, ELSET=cont_surf_conc_l_S3
    3527,    3534,    3570,    3579,    4754,    4763
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*ELSET, ELSET=cont_surf_conc_l_S6
    3530,    3533,    3569,    3582,    4753,    4766
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*SURFACE, NAME=cont_surf_conc_l
cont_surf_conc_l_S3, S3
cont_surf_conc_l_S6, S6
*ELSET, ELSET=cont_surf_stl_r_S3
    9573,    9574,    9575,    9576,    9577,    9578,    9579,    9580
*ELSET, ELSET=cont_surf_stl_r_S5
    9229,    9230,    9231,    9232,    9233,    9234
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*ELSET, ELSET=cont_surf_stl_r_S6
    9476,    9484,    9492,    9500,    9508,    9516,    9524,    9532,    9540,    9548,
    9556,    9564,    9572,    9580
*SURFACE, NAME=cont_surf_stl_r
cont_surf_stl_r_S3, S3
cont_surf_stl_r_S5, S5
cont_surf_stl_r_S6, S6
*ELSET, ELSET=cont_surf_conc_r_S3
    6855,    6862,    6898,    6907,    7298,    7307
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*ELSET, ELSET=cont_surf_conc_r_S6
    6858,    6861,    6897,    6910,    7297,    7310
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*SURFACE, NAME=cont_surf_conc_r
cont_surf_conc_r_S3, S3
cont_surf_conc_r_S6, S6
**
********************************** P R O P E R T I E S ************************
*SOLID SECTION, ELSET=concrete, MATERIAL=Default-Steel
*SOLID SECTION, ELSET=steel_supports, MATERIAL=Default-Steel
*SOLID SECTION, ELSET=steel_anchor, MATERIAL=Default-Steel
**
*END PART
**
**
**
********************************** E N D   P A R T S **********************************
**
**
********************************** A S S E M B L Y ************************************
**
*ASSEMBLY, NAME=ASSEMBLY1
**
*INSTANCE, NAME=Part-Default_1, PART=Part-Default
*END INSTANCE
**
*END ASSEMBLY
**
**
**
*MATERIAL, NAME = Default-Steel
*ELASTIC, TYPE=ISOTROPIC
2.068000e+05, 2.900000e-01
*DENSITY
7.000000e-06
*CONDUCTIVITY,TYPE=ISO
4.500000e-02
*SPECIFIC HEAT
5.000000e+02
**
**
************************************** H I S T O R Y *************************************
**
*PREPRINT
**
**************************************** S T E P 1 ***************************************
*STEP,INC=100,NAME=Default Set
**
*STATIC
1, 1, 1e-05, 1
**
**
**
**
*END STEP
